# OpenSim document version 40500
MarkerSet:
  Marker JOINT_HEAD: ground (0.08601154 0.5145062 -2.389654) fixed=true
  Marker JOINT_NECK: torso (-0.004879726 0.4619111 0.0007363225) fixed=true
  Marker JOINT_LEFT_COLLAR: torso (0.04344124 0.3743037 -0.00259888) fixed=true
  Marker JOINT_RIGHT_SHOULDER: torso (0.03355541 0.3763297 0.2085806) fixed=true
  Marker JOINT_LEFT_SHOULDER: torso (0.03685074 0.3824125 -0.2112917) fixed=true
  Marker JOINT_RIGHT_ELBOW: humerus_r (0.031328 -0.2954627 -0.006036929) fixed=true
  Marker JOINT_LEFT_ELBOW: humerus_l (0.01665962 -0.3039638 0.0001900588) fixed=true
  Marker JOINT_LEFT_WRIST: radius_l (-0.002654144 -0.232617 -0.01309663) fixed=true
  Marker JOINT_RIGHT_WRIST: radius_r (0.00263626 -0.2448707 0.009444992) fixed=true
  Marker JOINT_RIGHT_HAND: radius_r (-0.003308286 -0.3144241 0.00680765) fixed=true
  Marker JOINT_LEFT_HAND: radius_l (0.007173468 -0.331089 -0.01661645) fixed=true
  Marker JOINT_TORSO: pelvis (-0.09097068 0.1915623 -0.002022517) fixed=true
  Marker JOINT_WAIST: pelvis (-0.07868666 0.07064337 -0.002319379) fixed=true
  Marker JOINT_RIGHT_HIP: pelvis (-0.07539821 -0.06923519 0.1242609) fixed=true
  Marker JOINT_LEFT_HIP: pelvis (-0.06088771 -0.0739974 -0.1126619) fixed=true
  Marker JOINT_RIGHT_KNEE: femur_r (0.04060718 -0.4272361 -0.01108087) fixed=true
  Marker JOINT_LEFT_KNEE: femur_l (0.03727676 -0.4263511 -0.0114217) fixed=true
  Marker JOINT_RIGHT_ANKLE: tibia_r (0.02945429 -0.4352495 0.01341627) fixed=true
  Marker JOINT_LEFT_ANKLE: tibia_l (0.04787777 -0.4338821 -0.01428543) fixed=true
